c1x := 5
c2x := -9
c1x := 5
c2x := -9
c1x := 1.78972
c2x := 1.39286
c1y := 4
c2y := 2
c1y := 4
c2y := 2
c1y := 1.34049
c2y := 2.839
d1x := -2
d2x := 1
d1x := -2
d2x := 0
d1x := -0.356503
d2x := 2.97296
d1y := 4
d2y := 9
d1y := 4
d2y := 4
d1y := 1.96797
d2y := -0.401883
s1x := 3
s2x := 5
s1x := 0
s2x := 5
s1x := -0.722769
s2x := -0.995988
s1y := 5
s2y := 7
s1y := 0
s2y := 0
s1y := -0.69109
s2y := 0.0894836
Sx := s1x - s2x → 0.273219
Sy := s1y - s2y → -0.7805736
D1x := d1x - 2*c1x → -3.935943
D1y := d1y - 2*c1y → -0.71301
D2x := d2x - 2*c2x → 0.18724
D2y := d2y - 2*c2y → -6.079883
Qc1 := 2*c1x*D2y - 2*c1y*D2x → -22.2645631007
Qc2 := 2*c2x*D2y - 2*c2y*D2x → -18.0000003908
Qd := D1x*D2y - D1y*D2x → 24.0635769271
Qs := Sx*D2y - Sy*D2x → -1.51498495251
Rc := Qc1/Qc2 → 1.23692014541
Rd := Qd/Qc2 → -1.33686535582
Rs := Qs/Qc2 → 0.084165828868
a := -(D2x^2 + D2y^2)*Rd^2 → -66.1267967828
b := -2*(D2x^2 + D2y^2)*Rd*Rc → 122.36620051
c := -(D2x^2 + D2y^2)*(Rc^2 + 2*Rd*Rs + (2*c2y*D1x - 2*c2x*D1y)/Qc2) → -90.1379710092
d := -(D2x^2 + D2y^2)*(2*Rs*Rc + 4*(c1x*c2y - c1y*c2x)/Qc2) → 18.7215448798
e := -(D2x^2 + D2y^2)*(Rs^2 + 2*(Sx*c2y - Sy*c2x)/Qc2) → 7.39648590544
t1 ← Quartic(a, b, c, d, e) → Quartic(-66.1267967828, 122.36620051, -90.1379710092, 18.7215448798, 7.39648590544)
Qd*Qc1 + Qc2*(c2y*D1x - c2x*D1y) → -352.506679712
t2(t1) := Rd*t1^2 + Rc*t1 + Rs → 1.23692014541*t1 + (-1.33686535582*t1^2) + 0.084165828868
# Можно решить это уравнение 4й степени...
ba := b/a → -1.85047826998
ca := c/a → 1.36310808015
da := d/a → -0.283115859086
ea := e/a → -0.111853080223
alpha := -3*ba^2/8 + ca → 0.0790068947807
beta := (ba/2)^3 - ba*ca/2 + da → 0.186017968562
gamma := -3*(ba/4)^4 + ca*(ba/4)^2 - da*(ba/4) + ea → -0.0885095541084
beta ≠ 0
gamma ≠ 0
ba float → -1.85047826998
ca float → 1.36310808015
da float → -0.283115859086
p := -alpha^2/12 - gamma → 0.0879893799898
q := -alpha^3/108 + alpha*gamma/3 - beta^2/8 → -0.00666085695931
ea float → -0.111853080223
alpha float → 0.0790068947807
# Решаем кубическое
beta float → 0.186017968562
gamma float → -0.0885095541084
Q := -p/3 → -0.0293297933299
R := q/2 → -0.00333042847965
p float → 0.0879893799898
q float → -0.00666085695931
D := R^2 - Q^3 → 3.63223207358e-5
res3 :=
    if D < 0
        phi ← acos(R/|Q|^(3/2))/3
        SinPhi ← sin(phi)
        CosPhi ← cos(phi)
        sqrt(Q)*max(-2*CosPhi, CosPhi + SinPhi*sqrt(3), CosPhi - SinPhi*sqrt(3))
    otherwise
        u ← nthroot(-R + sqrt(D), 3)
        -p/(3*u) + u
Q float → -0.0293297933299
R float → -0.00333042847965
D float → 3.63223207358e-5
res3 float → 0.0715395841678
# Решили кубическое
y := -5/6*alpha + res3 → 0.00570050518386
W := sqrt(alpha + 2*y) → 0.300679073346
r1 := -3*alpha - 2*y → -0.24842169471
r2 := -2*beta/W → -1.23731902251
y float → 0.00570050518386
W float → 0.300679073346
r1 + r2 float → -1.48574071722
r1 float → -0.24842169471
# знак +
r2 float → -1.23731902251
r1 - r2 float → 0.988897327804
# знак -
res41 :=
    -ba/4 - W/2 + sqrt(r1 - r2)/2 if r1 - r2 > 0
    пусто otherwise
    → 0.80949661537
res42 :=
    -ba/4 - W/2 - sqrt(r1 - r2)/2 if r1 - r2 > 0
    пусто otherwise
    → -0.184936553729
res43 :=
    -ba/4 + W/2 + sqrt(r1 + r2)/2 if r1 + r2 > 0
    пусто otherwise
    → пусто
res44 :=
    -ba/4 + W/2 - sqrt(r1 + r2)/2 if r1 + r2 > 0
    пусто otherwise
    → пусто
t11 := res41 float → 0.80949661537
t21 := t2(t11) float → 0.209420992459
t12 := res42 float → -0.184936553729
t22 := t2(t12) float → -0.190308759171
t13 := res43 float → пусто
t23 := t2(t13) float → 1.23692014541*пусто + (-1.33686535582*пусто^2) + 0.084165828868
t14 := res44 float → пусто
t24 := t2(t14) float → 1.23692014541*пусто + (-1.33686535582*пусто^2) + 0.084165828868
# Проверяем результаты:
s1x + 2*c1x*t11 + D1x*t11^2 → -0.404387939732
s2x + 2*c2x*t21 + D2x*t21^2 → -0.404387939732
s1y + 2*c1y*t11 + D1y*t11^2 → 1.01192964181
s2y + 2*c2y*t21 + D2y*t21^2 → 1.01192964181
s1x + 2*c1x*t12 + D1x*t12^2 → -1.51935356616
s2x + 2*c2x*t22 + D2x*t22^2 → -1.51935356616
s1y + 2*c1y*t12 + D1y*t12^2 → -1.21128723394
s2y + 2*c2y*t22 + D2y*t22^2 → -1.21128723394
s1x + 2*c1x*t13 + D1x*t13^2 → 3.57944*пусто + (-3.935943*пусто^2) - 0.722769
s2x + 2*c2x*t23 + D2x*t23^2 → 3.44571318747*пусто + (-3.724132559*пусто^2) + 0.18724*(1.23692014541*пусто + (-1.33686535582*пусто^2) + 0.084165828868)^2 - 0.761525567206
s1y + 2*c1y*t13 + D1y*t13^2 → 2.68098*пусто + (-0.71301*пусто^2) - 0.69109
s2y + 2*c2y*t23 + D2y*t23^2 → 7.02323258564*пусто + (-7.59072149032*пусто^2) + (-6.079883*(1.23692014541*пусто + (-1.33686535582*пусто^2) + 0.084165828868)^2) + 0.567377176313
s1x + 2*c1x*t14 + D1x*t14^2 → 3.57944*пусто + (-3.935943*пусто^2) - 0.722769
s2x + 2*c2x*t24 + D2x*t24^2 → 3.44571318747*пусто + (-3.724132559*пусто^2) + 0.18724*(1.23692014541*пусто + (-1.33686535582*пусто^2) + 0.084165828868)^2 - 0.761525567206
s1y + 2*c1y*t14 + D1y*t14^2 → 2.68098*пусто + (-0.71301*пусто^2) - 0.69109
s2y + 2*c2y*t24 + D2y*t24^2 → 7.02323258564*пусто + (-7.59072149032*пусто^2) + (-6.079883*(1.23692014541*пусто + (-1.33686535582*пусто^2) + 0.084165828868)^2) + 0.567377176313
